! 工作目录
! D:/LEARNING/Courses/IV/FECD/manual/code
FINISH $ /CLEAR
/FILNAME,3-02
/TITLE,3-02
!==========
! 长度单位统一为mm
! 注: 用等式给参数赋值的时候
! 运算符号前后千万不要加空格
D = 5.13 $ D0 = 0.5*D
DEPTH = 1.2*D $ L = 15*D

R1 = 1.77 $ R2 = 3.36
GL = 1.59 $ GW = 1.59

dh = 0.05 $ n = 20
h = dh*n $ DA = DH*L
SIGMA_X = 100

E = 210E5 $ v = 0.3
!==========
/PREP7
ET,1,SOLID185
ET,2,MESH200,7

MP,EX,1,E
MP,PRXY,1,v
MP,EX,2,E
MP,PRXY,2,v
!==========
! 建立工件下表面
K,1,,,
K,2,L,0,0
K,3,L,L,0
K,4,0,L,0

L,1,2 $ L,2,3
L,3,4 $ L,4,1

AL,1,2,3,4
A0=_RETURN

! 建立圆面
CYL4,L/2,L/2,D0/2
NUM_CIR_P1=5  ! 第一象限的弧线的序号
ASEL,A,LOC,X,L/2-D0/2-0.1,L/2+D0/2+0.1

! 减去不必要的部分
ASBA,A0,ALL,,DELETE,KEEP
! 获取新生成的面的序号
*GET,A0,AREA,0,NUM,MAX

! 通过循环创建应变花
K,11,L/2+R1,L/2+GW/2
K,12,L/2+R1,L/2-GW/2
K,13,L/2+R2,L/2-GW/2
K,14,L/2+R2,L/2+GW/2

K,21,L/2-0.5*D/1.414         ,L/2+0.5*D/1.414-GW/1.414
K,22,L/2-0.5*D/1.414+GL/1.414,L/2+0.5*D/1.414
K,23,L/2-0.5*D/1.414         ,L/2+0.5*D/1.414+GW/1.414
K,24,L/2-0.5*D/1.414-GL/1.414,L/2+0.5*D/1.414

K,31,L/2+GW/2,L/2-R1
K,32,L/2-GW/2,L/2-R1
K,33,L/2-GW/2,L/2-R2
K,34,L/2+GW/2,L/2-R2

*DIM,NUM_GAUGE,ARRAY,3,1
*DO,I,1,3,1
  L,10*I+1,10*I+2 $ L,10*I+2,10*I+3
  L,10*I+3,10*I+4 $ L,10*I+4,10*I+1
  L_CACHE=_RETURN

  AL,L_CACHE-3,L_CACHE-2,L_CACHE-1,L_CACHE
  A_CACHE=_RETURN

  ! 减去不必要的部分
  ASBA,A0,A_CACHE,,DELETE,KEEP
  ! 获取新生成面的序号
  *GET,A0,AREA,0,NUM,MAX

  ! 导出A_CACHE,有用
  NUM_GAUGE(I,1)=A_CACHE
*ENDDO

! 拖拽出工件
K,41,0,0,H
L,1,41
PATH_D=_RETURN

CSYS,0

K,42,0,0,H-DEPTH
L,1,42
PATH_UD=_RETURN

ASEL,ALL
VDRAG,ALL,,,,,,PATH_UD,PATH_D

! SIZE CONTROL
! 钻孔层
LSEL,ALL
LSEL,R,LENGTH,,H
LESIZE,ALL,,,20

! 非钻孔层
LSEL,ALL
LSEL,R,LENGTH,,DEPTH-H
LESIZE,ALL,,,10

! 边长
LSEL,ALL
LSEL,R,LENGTH,,L
LESIZE,ALL,,,50

! 其他
LSEL,ALL
LSEL,U,LENGTH,,H
LSEL,U,LENGTH,,DEPTH-H
LSEL,U,LENGTH,,L
LESIZE,ALL,,,5

ASEL,ALL
ASEL,S,LOC,Z,DEPTH-0.01,DEPTH+0.01
ASEL,A,LOC,Z,DEPTH-H-0.01,DEPTH-H+0.01
ASEL,A,LOC,Z,0-0.01,0+0.01

AATT,1,,2

MSHAPE,0,2D
MSHKEY,1
AMESH,ALL

MSHAPE,0,3D
MSHKEY,1
VSEL,ALL
VATT,1,,1
VSWEEP,ALL

!! 选取单元
! 建立柱坐标系, 命名为11
K,100,L/2,L/2  ! 柱坐标系原点
K,101,L,L/2  ! 柱坐标系x轴方向
K,102,L/2,L  ! 柱坐标系"y"轴方向
CSKP,11,1,100,101,102
CSYS,11  ! 打开坐标系11

! 选取单元
ESEL,S,CENT,X,0,D0/2
ESEL,R,CENT,Z,DEPTH-H,DEPTH

!! 对单元进行排序
! 获取最大单元编号
*GET,EMAX,ELEM,,NUM,MAX
! 获取最小单元编号
*GET,EMIN,ELEM,,NUM,MIN
! 获取单元数
*GET,SUM_ELEM,ELEM,,COUNT
! 定义五个维数等于单元数的数组
*DIM,NE,,SUM_ELEM
*DIM,EX,,SUM_ELEM
*DIM,EY,,SUM_ELEM
*DIM,EZ,,SUM_ELEM
*DIM,EORDER,,SUM_ELEM

! 获取单元的编号以及坐标数据
II = 0  ! 辅助变量
*DO,I,EMIN,EMAX,1
  *IF,ESEL(I),EQ,1,THEN
    II = II+1  ! 如果单元被选中
    NE(II) = I  ! 则将其的序号记录在数组NE内
    ! 将其的坐标记录在数组内
    *GET,EX(II),ELEM,NE(II),CENT,X
    *GET,EY(II),ELEM,NE(II),CENT,Y
    *GET,EZ(II),ELEM,NE(II),CENT,Z
  *ENDIF
*ENDDO

!! 这里打算用matlab写一个排序程序
!! 把他封装为exe后在ANSYS里面调用
!! 不然排序太折磨人了
*CREATE,datawrite,mac  ! 创建写出宏
! 写出NE
*CFOPEN,NE,dat
  *VWRITE,NE(1)
  (960F6.0)
*CFCLOSE
! 写出EX
*CFOPEN,EX,dat
  *VWRITE,EX(1)
  (960F11.9)
*CFCLOSE
! 写出EY
*CFOPEN,EY,dat
  *VWRITE,EY(1)
  (960F12.6)
*CFCLOSE
! 写出EZ
*CFOPEN,EZ,dat
  *VWRITE,EZ(1)
  (960F6.3)
*CFCLOSE
*END  ! 宏创建完毕
Datawrite  ! 运行宏文件

!! 运行MATLAB排序文件
/sys,sorting.exe

!! 读入MATLAB排序结果
*CREATE,DATAREAD,mac
*VREAD,EORDER(1),EORDER,dat,,IJK
(f6.0)
*END
DATAREAD

!! 定义一个参数
!ASSIT=0
!! 已测试该排序无误
!! 但排序耗时极长
!! 不要随意测试
!*DO,J,1,SUM_ELEM,1
!  ! 每次排序时减去编号为ASSIT的单元
!  ! 注: 在刚开始进行排序时, 会弹出一个Warning:
!  ! Specified range of 0 to 0 is not permitted.
!  ! The ESEL command is ignored.
!  ! 并不影响计算
!  ESEL,U,ELEM,,ASSIT
!  ! 重新获取被选中单元的数量
!  *GET,C,ELEM,,COUNT
!  ! 设置一个用于记录单元
!  ! 序号的参数II
!  II=0
!
!  ! 记录单元序号
!  *DO,I,1,EMAX
!    ! 判断单元是否被选中
!    *IF,ESEL(I),EQ,1,THEN
!      II=II+1
!      ! 如果被选中
!      ! 则将其记录在数组NE内
!      NE(II)=I
!    *ENDIF
!  *ENDDO
!
!  ! 获取数组内单元的坐标
!  *DO,I,1,C,1
!    *GET,EX(I),ELEM,NE(II),CENT,X
!    *GET,EY(I),ELEM,NE(II),CENT,Y
!    *GET,EZ(I),ELEM,NE(II),CENT,Z
!  *ENDDO
!
!  ! 定义三个比较变量
!  MINX=1E10
!  MINY=1E10
!  MAXZ=0
!
!  ! 对数组内单元的坐标进行排序
!  ! 排序原则:
!  ! 1. 优先选取Z最大的
!  ! 2. 若Z相等, 优先选取x最小的
!  ! 3. 若x相等, 优先选取y最小的
!  *DO,I,1,C,1
!    ! 如果单元Z大于MAXZ
!    *IF,EZ(I),GT,MAXZ,THEN
!      ! 将符合条件的单元的坐标
!      ! 赋值给比较变量
!      MINX=EX(I)
!      MINY=EY(I)
!      MAXZ=EZ(I)
!      ! 记录符合条件的单元号
!      ASSIT=NE(II)
!    *ELSEIF,EX(I),EQ,MAXZ,THEN
!      *IF,EX(I),LT,MINX,THEN
!        ! 将符合条件的单元的坐标
!        ! 赋值给比较变量
!        MINX=EX(I)
!        MINY=EY(I)
!        MAXZ=EZ(I)
!        ! 记录符合条件的单元号
!        ASSIT=NE(II)
!      *ELSEIF,EX(I),GT,MINX,THEN
!        *IF,EY(I),LT,MINY,THEN
!          ! 将符合条件的单元的坐标
!          ! 赋值给比较变量
!          MINX=EX(I)
!          MINY=EY(I)
!          MAXZ=EZ(I)
!          ! 记录符合条件的单元号
!          ASSIT=NE(II)
!        *ENDIF
!      *ENDIF
!    *ENDIF
!  *ENDDO
!
!  ! 将判断符合条件的单元编号
!  ! 存入数组
!  EORDER(J)=ASSIT
!*ENDDO  ! 结束循环

!! 为数据提取做准备
! 激活整体坐标系
CSYS,0

! 提取第一组应变片对应的单元序号
! 选中第一组应变片对应的单元
ESEL,S,CENT,X,L/2+R1,L/2+R2
ESEL,R,CENT,Y,L/2-GW/2,L/2+GW/2
ESEL,R,CENT,Z,DEPTH-0.01,DEPTH
! 获取区域内单元最大序号
*GET,NUM_GAUGE1_MAX,ELEM,0,NUM,MAX
! 获取区域内单元最小序号
*GET,NUM_GAUGE1_MIN,ELEM,0,NUM,MIN
! 获取区域内单元数量
*GET,COUNT_STRAIN_GAUGE1,ELEM,0,COUNT
! 定义一个用于储存单元序号的数组
*DIM,STRAIN_GAUGE1,,COUNT_STRAIN_GAUGE1
! 设定一个辅助参数
II=0
! 记录
*DO,I,NUM_GAUGE1_MIN,NUM_GAUGE1_MAX,1
  ! 判断单元是否被选中
  *IF,ESEL(I),EQ,1,THEN
    ! 如果单元被选中
    II=II+1
    ! 则将其记录在数组STRAIN_GAUGE1内
    STRAIN_GAUGE1(II)=I
  *ENDIF
*ENDDO  ! 结束记录

! 提取第三组应变片对应的单元序号
! 选中第三组应变片对应的单元
ESEL,S,CENT,X,L/2-GW/2,L/2+GW/2
ESEL,R,CENT,Y,L/2-R2,L/2-R1
ESEL,R,CENT,Z,DEPTH-DH,DEPTH
! 获取区域内单元最大序号
*GET,NUM_GAUGE3_MAX,ELEM,0,NUM,MAX
! 获取区域内单元最小序号
*GET,NUM_GAUGE3_MIN,ELEM,0,NUM,MIN
! 获取区域内单元数量
*GET,COUNT_STRAIN_GAUGE3,ELEM,0,COUNT
! 定义一个用于储存单元序号的数组
*DIM,STRAIN_GAUGE3,ARRAY,COUNT_STRAIN_GAUGE3
! 设定一个辅助参数
II=0
! 记录
*DO,I,NUM_GAUGE3_MIN,NUM_GAUGE3_MAX,1
  ! 判断单元是否被选中
  *IF,ESEL(I),EQ,1,THEN
    ! 如果单元被选中
    II=II+1
    ! 则将其记录在数组STRAIN_GAUGE2内
    STRAIN_GAUGE3(II)=I
  *ENDIF
*ENDDO  ! 结束记录

! 建立应变矩阵(ANSYS计算不了太复杂的式子)
*DIM,MATRIX_EP1,ARRAY,N,N
*DIM,MATRIX_EP3,ARRAY,N,N
! 建立两个算术用的变量
*SET,SUM_EP,0
*SET,AVG_EP,0


ALLSEL,ALL
FINISH

!!-----求解-----
/SOLU
ANTYPE,STATIC  ! 设置分析类型为STATIC
NLGEOM,ON  ! 打开大变形效应
NROPT,FULL  ! 使用不省略的NEWTON-RAPHSON选项
! 为底面加约束
NSEL,ALL
NSEL,S,LOC,Z,0-0.01,0+0.01
D,ALL,ALL
! 第0次求解
ALLSEL,ALL
SOLVE
! 分步求解
*DO,I,1,N,1
  ! BIRTH OR DEATH
  *DO,J,1+(I-1)*(SUM_ELEM/N),I*(SUM_ELEM/N),1
    EKILL,EORDER(J)
  *ENDDO

  *DO,K,1,N,1
    ! 设置载荷步
    *SET,TIME_STEP,100*I+K
    TIME,TIME_STEP

    ! 清除所有约束及载荷
    LSCLEAR,ALL

    !! 施加约束
    NSEL,ALL
    NSEL,S,LOC,Z,0-0.01,0+0.01
    D,ALL,ALL

    !! 施加载荷
    ! 选中右侧待加载节点
    NSEL,ALL
    NSEL,R,LOC,X,L-0.01,L+0.01
    NSEL,R,LOC,Z,DEPTH-I*DH-0.01,DEPTH-(I-1)*DH+0.01
    ! 获取选中节点数量
    *GET,NUM_CACHE,NODE,0,COUNT
    ! 计算应分摊到每个节点上的数量
    *SET,DF,SIGMA_X*DA/NUM_CACHE
    ! 加载
    F,ALL,FX,DF

    ! 选中左侧待加载节点
    NSEL,ALL
    NSEL,S,LOC,X,0-0.01,0+0.01
    NSEL,R,LOC,Z,DEPTH-I*DH-0.01,DEPTH-(I-1)*DH+0.01
    ! 获取选中节点数量
    *GET,NUM_CACHE,NODE,0,COUNT
    ! 计算应分摊到每个节点上的数量
    *SET,DF,SIGMA_X*DA/NUM_CACHE
    ! 加载
    F,ALL,FX,-DF

    ALLSEL,ALL
    SOLVE

    ! 提取数据
    ETABLE,TABLE_EQV,EPTO,EQV
    *DO,II,1,COUNT_STRAIN_GAUGE1,1
      *SET,SUM_EP,SUM_EP+TABLE_EQV(II)
    *ENDDO
    *SET,AVG_EP,SUM_EP/COUNT_STRAIN_GAUGE1
    *SET,MATRIX_EP1(I,K),AVG_EP
    *SET,SUM_EP,0

    *DO,II,1,COUNT_STRAIN_GAUGE2,1
      *SET,SUM_EP,SUM_EP+TABLE_EQV(II)
    *ENDDO
    *SET,AVG_EP,SUM_EP/COUNT_STRAIN_GAUGE2
    *SET,MATRIX_EP2(I,K),AVG_EP
    *SET,SUM_EP,0
  *ENDDO
*ENDDO

! !! 分步加载并求解
! *DO,I,1,N,1
!   /SOLU
!   ! BIRTH OR DEAD
!   ESEL,ALL
!   *DO,J,1+((SUM_ELEM/N))*(I-1),((SUM_ELEM/N))*I,1
!     EKILL,EORDER(I)
!   *ENDDO

!   ! 循环内循环
!   *DO,J,1,I,1
!   /SOLU
!     ! 清除所有作用在节点上的力
!     NSEL,ALL
!     FDELE,NODE,ALL
!     ! 选中右侧待加载节点
!     NSEL,S,LOC,X,L-0.01,L+0.01
!     NSEL,R,LOC,Z,DEPTH-J*DH-0.01,DEPTH-(J-1)*DH+0.01

!     ! 获取选中节点数量
!     *GET,NUM_CACHE,NODE,0,COUNT

!     ! 计算应分摊到每个节点上的数量
!     *SET,DF,SIGMA_X*DA/NUM_CACHE

!     ! 加载
!     F,ALL,FX,DF

!     ! 选中左侧待加载节点
!     NSEL,S,LOC,X,0-0.01,0+0.01
!     NSEL,R,LOC,Z,DEPTH-J*DH-0.01,DEPTH-(J-1)*DH+0.01

!     ! 获取选中节点数量
!     *GET,NUM_CACHE,NODE,0,COUNT

!     ! 计算应分摊到每个节点上的数量
!     *SET,DF,SIGMA_X*DA/NUM_CACHE

!     ! 加载
!     F,ALL,FX,-DF

!     ALLSEL,ALL

!     !! 求解
!     SOLVE

!     /POST1  ! 提取数据
!     !! 提取应变片内的数据
!     ! 提取应变片1内的数据
!     *SET,SUM,0  ! 创建一个求和系数
!     *SET,EPSILON1,0
!     *DO,K,1,COUNT_STRAIN_GAUGE1,1
!       ! *GET,D_E1,NODE,STRAIN_GAUGE1(K),EPTO,EQV
!       ESOL,D_E1,STRAIN_GAUGE1(K),,S,EQV
!       *SET,SUM,SUM+D_E1
!     *ENDDO
!     CACHE = SUM/COUNT_STRAIN_GAUGE1
!     *SET,M_E1(I,J),CACHE

!     ! 提取应变片3内的数据
!     SUM = 0  ! 创建一个求和系数
!     EPSILON3 = 0
!     *DO,K,1,COUNT_STRAIN_GAUGE3,1
!       ! *GET,D_E3,NODE,STRAIN_GAUGE3(K),EPTO,EQV
!       ESOL,D_E3,STRAIN_GAUGE3(K),,S,EQV
!       *SET,SUM,SUM+D_E3
!     *ENDDO
!     CACHE=SUM/COUNT_STRAIN_GAUGE3
!     *SET,M_E3(I,J),CACHE

!     !! 利用说明书中的式子计算校准系数
!     ! A_ni(I,J) = (EPSILON1+EPSILON3)*E)/(SIGMA_X)

!   *ENDDO
! *ENDDO


!! 生死单元法
!-----TEST-----
! 选取单元
! CSYS,11
! ESEL,S,CENT,X,0,D0/2
! ESEL,R,CENT,Z,DEPTH-H,DEPTH
! EPLOT

! DEAD OR ALIVE
! *DO,I,1,SUM_ELEM,1
!   EKILL,EORDER(I)
!   ESEL,R,LIVE
!   EPLOT
! *ENDDO
